*Heading
** Job name: heat Model name: Model-1
** Generated by: Abaqus/CAE Learning Edition 2024
*Preprint, echo=NO, model=NO, history=NO, contact=NO
**
** PARTS
**
*Part, name=Part-1
*Node
      1,           0.,           0.
      2,  0.100000001,           0.
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*Element, type=DC2D4
  1,   1,   2,  23,  22
  2,   2,   3,  24,  23
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*Nset, nset=Set-1, generate
   1,  231,    1
*Elset, elset=Set-1, generate
   1,  200,    1
*Orientation, name=Ori-1
1., 0., 0., 0., 1., 0.
3, 0.
** Section: Section-1
*Solid Section, elset=Set-1, orientation=Ori-1, material=condu
,
*End Part
**
**
** ASSEMBLY
**
*Assembly, name=Assembly
**
*Instance, name=Part-1-1, part=Part-1
*End Instance
**
*Nset, nset=Set-1, instance=Part-1-1, generate
   1,  211,   21
*Elset, elset=Set-1, instance=Part-1-1, generate
   1,  181,   20
*Nset, nset=Set-2, instance=Part-1-1, generate
  21,  231,   21
*Elset, elset=Set-2, instance=Part-1-1, generate
  20,  200,   20
*End Assembly
**
** MATERIALS
**
*Material, name=condu
*Conductivity
 1.4,
*Density
800.,
*Specific Heat
 0.8,
** ----------------------------------------------------------------
**
** STEP: Step-1
**
*Step, name=Step-1, nlgeom=NO
*Heat Transfer, end=PERIOD, deltmx=10.
0.1, 200., 0.002, 100.,
**
** BOUNDARY CONDITIONS
**
** Name: BC-1 Type: Temperature
*Boundary
Set-1, 11, 11, 100.
** Name: BC-2 Type: Temperature
*Boundary
Set-2, 11, 11
**
** OUTPUT REQUESTS
**
*Restart, write, frequency=0
**
** FIELD OUTPUT: F-Output-1
**
*Output, field, variable=PRESELECT
**
** HISTORY OUTPUT: H-Output-1
**
*Output, history
*Radiation Output, variable=ALL
*Contact Output
HFLA, HTL, HTLA, SJD, SJDA, SJDE, SJDEA, SJDET, SJDETA, SJDR, SJDRA, SJDRT, SJDRTA, SJDT, SJDTA, WEIGHT
*End Step
